# Metalworking Spindle Pulley Characteristics
# Rotational Speed
N_metal := 900 rpm
# Pulley Diameter | Center Distance from Motor Pulley
L_motor_metal := 3.7 in = 0.09398 m
D_metal := 2.5*1.5*in = 9.525 cm
# Woodworking Spindle Pulley Characteristics
# Rotational Speed
N_wood := 4000 rpm
# Pulley Diameter | Center Distance from Motor Pulley
D_wood := 1.5 in
L_motor_wood := 9.3345 cm
# Motor Pulley Characteristics
# Power | Pulley Diameter
P_motor := 300 W
D_motor := 1.5 in = 0.0381 m
# Rotational Speeds
N_motor_metal := N_metal*D_metal/D_motor = 2250 rpm
N_motor_wood := N_wood*D_wood/D_motor
# Belt Characteristics (not dependent on shape)
# Angle of Contact of the belt
# For Metal | For Wood
θ_motor_metal := π - 2*asin((D_metal - D_motor)/(2*L_motor_metal))
θ_motor_wood := π - 2*asin((D_wood - D_motor)/(2*L_motor_wood))
θ_metal := π + 2*asin((D_metal - D_motor)/(2*L_motor_metal))
θ_wood := π + 2*asin((D_wood - D_motor)/(2*L_motor_wood))
# Length of the belt
# For Metal
L_belt_metal := sqrt(4*L_motor_metal^2 - (D_metal - D_motor)^2) + 1/2*(D_metal*θ_metal + D_motor*θ_motor_metal)
L_belt_metal = 15.9915 in
# For Wood
L_belt_wood := sqrt(4*L_motor_wood^2 - (D_wood - D_motor)^2) + 1/2*(D_wood*θ_wood + D_motor*θ_motor_wood)
L_belt_wood = 12.0624 in
# Flat Belt
# Characteristics
# Coefficient of Friction | Efficiency
f_flat := 0.6/sin(1/4)
η_flat := 0.8
# Output Torques
# For Metal | For Wood
T_metal := P_motor*η_flat/N_metal = 2.54648 N*m
T_wood := P_motor*η_flat/N_wood = 0.572958 N*m
# Pre-tension
# For Metal
F_i_metal := T_metal/D_metal*(exp(f_flat*θ_metal) + 1)/(exp(f_flat*θ_metal) - 1)
F_i_metal = 26.7406 N
F_i_motor_metal := P_motor/(N_motor_metal*D_motor)*(exp(f_flat*θ_motor_metal) + 1)/(exp(f_flat*θ_motor_metal) - 1) = 33.5656 N
# For Wood
F_i_wood := T_wood/D_wood*(exp(f_flat*θ_wood) + 1)/(exp(f_flat*θ_wood) - 1)
F_i_wood = 15.053 N
F_i_motor_wood := P_motor/(N_motor_wood*D_motor)*(exp(f_flat*θ_motor_wood) + 1)/(exp(f_flat*θ_motor_wood) - 1) = 18.8163 N
# Loading Motor Tension
b := .5*in
h := .055*in
ρ := 1250*kg/m^3
g = 9.80665 m/s^2
w := ρ*b*h = 0.0221774 kg/m
F_c_wood_motor := w*(π*D_motor*N_motor_wood)^2 = 55.749 N
F_c_metal_motor := w*(π*D_motor*N_motor_metal)^2 = 17.6393 N
F_c_metal_spindle := w*(π*D_metal*N_metal)^2 = 17.6393 N
F_load_on_metal_motor := 2*F_i_motor_metal + 2*F_c_metal_motor = 102.41 N
F_load_on_wood_motor := 2*F_i_motor_wood + 2*F_c_wood_motor = 149.131 N
# Will Our Belt Die?
F_a := 9.8 lbf/in
C_v := 1
C_p := 1
Ratio_of_Pulley_Speed_To_Belt_Length := N_motor_metal/L_belt_metal = 10608.5 1/(ft*min)
F_1a := b*F_a*C_p*C_v = 21.7963 N
F1 := F_c_metal_motor + F_i_motor_metal*2*exp(f_flat*θ_motor_metal)/(exp(f_flat*θ_motor_metal) + 1) = 84.6232 N
# Round Belt
# V-Belt
# Timing Belt
