# Motor Pulley Characteristics
# Power | Pulley Diameter
P_motor := 500 W
D_motor := 2.54 cm
# Metalworking Spindle Pulley Characteristics
# Rotational Speed
N_metal := 2500 rpm
# Pulley Diameter | Center Distance from Motor Pulley
D_metal := 8.255 cm
L_motor_metal := 9.3345 cm
# Woodworking Spindle Pulley Characteristics
# Rotational Speed
N_wood := 12000 rpm
# Pulley Diameter | Center Distance from Motor Pulley
D_wood := 2.54 cm
L_motor_wood := 9.3345 cm
# Flat Belt
# Angle of Contact of the belt
# For Metal | For Wood
θ_motor_metal := π - 2*asin((D_metal - D_motor)/(2*L_motor_metal))
θ_motor_wood := π - 2*asin((D_wood - D_motor)/(2*L_motor_wood))
θ_metal := π + 2*asin((D_metal - D_motor)/(2*L_motor_metal))
θ_wood := π + 2*asin((D_wood - D_motor)/(2*L_motor_wood))
# Length of the belt
# For Metal
L_belt_metal := sqrt(4*L_motor_metal^2 - (D_metal - D_motor)^2) + 1/2*(D_metal*θ_metal + D_motor*θ_motor_metal)
L_belt_metal = 0.365075 m
# For Wood
L_belt_wood := sqrt(4*L_motor_wood^2 - (D_wood - D_motor)^2) + 1/2*(D_wood*θ_wood + D_motor*θ_motor_wood)
L_belt_wood = 0.266486 m
# Coefficient of friction between the belt and the pulleys
f := 0.7
# Pre-tension
# For Metal
F_i_metal := P_motor/(D_metal*N_metal)*(exp(f*θ_motor_metal) + 1)/(exp(f*θ_motor_metal) - 1)
F_i_metal = 32.7097 N
# For Wood
F_i_wood := P_motor/(D_wood*N_wood)*(exp(f*θ_motor_wood) + 1)/(exp(f*θ_motor_wood) - 1)
F_i_wood = 19.5728 N
# Round Belt
# V-Belt
# Timing Belt
