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# Spindle Model - Take 2
# Non-Spindle Shaft Dimensions
D_bearing_inner := 0.75 in
D_chuck := 2 cm
D_part := 40 mm
L_part := 5 cm
# Applied Forces
F_cut_x := 10 N
F_cut_y := 115 N
F_feed_z := -50 N
T_pulley := 3.45 N*m
F_preload := 50.102 N
F_t := 60 N
# Spindle Shaft Dimensions
L_ef := 18 mm
L_de := 46.12 mm
L_cd := 50 mm
L_bc := 29.54 mm
L_ab := 16.30 mm
D_ef := D_chuck
D_de := D_bearing_inner
D_cd := 1 in
D_bc := D_bearing_inner
D_ab := D_bc
L_total := L_ef + L_de + L_cd + L_bc + L_ab = 159.96 mm
a_bearing := 5.6 mm
L_a := L_ab + L_bc + a_bearing
L_b := L_ab + L_bc + L_cd - a_bearing
# Calculate Bearing Forces
# Forces on Bearing A (Pulley Side)
R_a_y := (F_cut_y*(L_part + L_total - L_a) - F_t*L_a)/(L_b - L_a) - F_t - F_cut_y = 215.294 N
R_a_x := (F_cut_x*(L_part + L_total - L_a) + F_feed_z*D_part/2)/(L_b - L_a) - F_cut_x
R_a_z := -F_feed_z + F_preload
# Forces on Bearing B (Chuck Side)
R_b_x := -(F_cut_x*(L_part + L_total - L_a) + F_feed_z*D_part/2)/(L_b - L_a) = -15.0825 N
R_b_y := -(F_cut_y*(L_part + L_total - L_a) - F_t*L_a)/(L_b - L_a) = -390.294 N
R_b_z := -F_preload
# Resistive Moment
M_r := (L_cd + (L_bc/2) + (L_de/2))*(R_a_y - R_b_y)
# Material Properties - 12L14 and Bearing Stiffness
E := 200 GPa
E_part := 200 GPa
K_b := 5 N/μm
G := 80 GPa
G_part := 80 GPa
# HTMS - FP
I_fp := π*D_part^4/64
J_fp := π*D_part^4/32
A_fp := π*D_part^2/2
U_S := [1, 0, 0, 0; 0, 1, 0, 0; 0, 0, 1, 0; 0*m^-1, 0 m^-1, 0 m^-1, 1 m^-1]
I := [1 m; 1 m; 1 m; 1 m]
# Nominal geometry
T_n_fp := [1, 0, 0, 0 m; 0, 1, 0, 0 m; 0, 0, 1, L_part; 0, 0, 0, 1*m]
# Translation errors
T_z_fp := [1, 0, 0, 0*m; 0, 1, 0, 0*m; 0, 0, 1, F_feed_z*L_part/(E_part*A_fp); 0, 0, 0, 1*m]
T_y_fp := [1, 0, 0, 0*m; 0, 1, 0, F_cut_y*L_part^3/(3*E_part*I_fp); 0, 0, 1, 0*m; 0, 0, 0, 1*m]
T_x_fp := [1, 0, 0, F_cut_x*L_part^3/(3*E_part*I_fp); 0, 1, 0, 0*m; 0, 0, 1, 0*m; 0, 0, 0, 1*m]
# Rotation errors
R_z_fp := [
    1, F_cut_y*D_part/2*L_part/(J_fp*G_part), 0, 0*m;
    -F_cut_y*D_part/2*L_part/(J_fp*G_part), 1, 0, 0*m;
    0, 0, 1, 0*m;
    0, 0, 0, 1*m
] = [1, 5.71963e-6, 0, 0 m; -5.71963e-6, 1, 0, 0 m; 0, 0, 1, 0 m; 0, 0, 0, 1 m]
R_x_fp := [
    1, 0, 0, 0*m;
    0, 1, F_cut_y*L_part^2/(2*E_part*I_fp), 0*m;
    0, -(F_cut_y*L_part^2/(2*E_part*I_fp)), 1, 0*m;
    0, 0, 0, 1*m
] = [1, 0, 0, 0 m; 0, 1, 5.71963e-6, 0 m; 0, -5.71963e-6, 1, 0 m; 0, 0, 0, 1 m]
R_y_fp := [
    1, 0, F_cut_x*L_part^2/(2*E_part*I_fp) - F_feed_z*D_part/2*L_part/(E_part*I_fp), 0*m;
    0, 1, 0, 0*m;
    -(F_cut_x*L_part^2/(2*E_part*I_fp) - F_feed_z*D_part/2*L_part/(E_part*I_fp)), 0, 1, 0*m;
    0, 0, 0, 1*m
] = [1, 0, 2.4868e-6, 0 m; 0, 1, 0, 0 m; -2.4868e-6, 0, 1, 0 m; 0, 0, 0, 1 m]
# Actual Position
T_fp := (U_S*T_n_fp)*U_S*T_x_fp*U_S*T_y_fp*U_S*T_z_fp
R_fp := (U_S*R_x_fp)*(U_S*R_y_fp)*(U_S*R_z_fp)
R_fp*U_S*I - U_S*I = [8.20643e-6 m; -1.42237e-11 m; -8.20641e-6 m; 0]
H_fp := T_fp*R_fp
# Segment EF
I_ef := π*D_ef^4/64
J_ef := π*D_ef^4/32
A_ef := π*D_ef^2/2
# Local Forces
F_z_ef := F_feed_z
F_y_ef := F_cut_y
F_x_ef := F_cut_x
M_z_ef := -F_cut_y*D_part/2
M_y_ef := F_cut_x*L_part - F_feed_z*D_part/2
M_x_ef := F_cut_y*L_part
# Nominal geometry
T_n_ef := [1, 0, 0, 0*m; 0, 1, 0, 0*m; 0, 0, 1, L_ef; 0, 0, 0, 1*m]
# Translation errors
T_z_ef := [1, 0, 0, 0*m; 0, 1, 0, 0*m; 0, 0, 1, F_z_ef*L_ef/(A_ef*E); 0, 0, 0, 1*m]
T_y_ef := [
    1, 0, 0, 0*m;
    0, 1, 0, M_x_ef*L_ef^2/(2*E*I_ef) + F_y_ef*L_ef^3/(3*E*I_ef);
    0, 0, 1, 0*m;
    0, 0, 0, 1*m
]
T_x_ef := [
    1, 0, 0, M_y_ef*L_ef^2/(2*E*I_ef) + F_x_ef*L_ef^3/(3*E*I_ef);
    0, 1, 0, 0*m;
    0, 0, 1, 0*m;
    0, 0, 0, 1*m
]
# Rotation errors
R_z_ef := [1, -(M_z_ef*L_ef/(J_ef*G)), 0, 0*m; M_z_ef*L_ef/(J_ef*G), 1, 0, 0*m; 0, 0, 1, 0*m; 0, 0, 0, 1*m] = [1, 3.29451e-5, 0, 0 m; -3.29451e-5, 1, 0, 0 m; 0, 0, 1, 0 m; 0, 0, 0, 1 m]
R_x_ef := [
    1, 0, 0, 0*m;
    0, 1, M_x_ef*L_ef/(E*I_ef) + F_y_ef*L_ef^2/(2*E*I_ef), 0*m;
    0, -(M_x_ef*L_ef/(E*I_ef) + F_y_ef*L_ef^2/(2*E*I_ef)), 1, 0*m;
    0, 0, 0, 1*m
] = [1, 0, 0, 0 m; 0, 1, 7.77504e-5, 0 m; 0, -7.77504e-5, 1, 0 m; 0, 0, 0, 1 m]
R_y_ef := [
    1, 0, M_y_ef*L_ef/(E*I_ef) + F_x_ef*L_ef^2/(2*E*I_ef), 0*m;
    0, 1, 0, 0*m;
    -(M_y_ef*L_ef/(E*I_ef) + F_x_ef*L_ef^2/(2*E*I_ef)), 0, 1, 0*m;
    0, 0, 0, 1*m
] = [1, 0, 1.82201e-5, 0 m; 0, 1, 0, 0 m; -1.82201e-5, 0, 1, 0 m; 0, 0, 0, 1 m]
# Actual Position
T_ef := U_S*T_n_ef*U_S*T_x_ef*U_S*T_y_ef*U_S*T_z_ef
R_ef := U_S*R_x_ef*U_S*R_y_ef*U_S*R_z_ef
R_ef*U_S*I - U_S*I = [5.11651e-5 m; 4.48039e-5 m; -9.59685e-5 m; 0]
H_ef := T_ef*R_ef
# Before EF
# Bearing tilt
L_ab_bearing := L_bc/2 + L_cd + L_de/2 - 2*a_bearing
θ_y := (R_a_x + R_b_x)/(L_ab_bearing*K_b)
θ_x := (R_a_y + R_b_y)/(L_ab_bearing*K_b)
δ_x_bearing := (R_a_x + R_b_x)/(2*K_b)
δ_y_bearing := (R_a_y + R_b_y)/(2*K_b)
T_y_bearing := [1, 0, 0, 0*m; 0, 1, 0, δ_y_bearing; 0, 0, 1, 0*m; 0, 0, 0, 1*m] = [1, 0, 0, 0 m; 0, 1, 0, -1.75e-5 m; 0, 0, 1, 0 m; 0, 0, 0, 1 m]
T_x_bearing := [1, 0, 0, δ_x_bearing; 0, 1, 0, 0*m; 0, 0, 1, 0*m; 0, 0, 0, 1*m] = [1, 0, 0, -1e-6 m; 0, 1, 0, 0 m; 0, 0, 1, 0 m; 0, 0, 0, 1 m]
R_x_bearing := [1, 0, 0, 0*m; 0, 1, θ_x, 0*m; 0, -θ_x, 1, 0*m; 0, 0, 0, 1*m] = [1, 0, 0, 0 m; 0, 1, -0.00045674, 0 m; 0, 0.00045674, 1, 0 m; 0, 0, 0, 1 m]
R_y_bearing := [1, 0, θ_y, 0*m; 0, 1, 0, 0*m; -θ_y, 0, 1, 0*m; 0, 0, 0, 1*m] = [1, 0, -2.60994e-5, 0 m; 0, 1, 0, 0 m; 2.60994e-5, 0, 1, 0 m; 0, 0, 0, 1 m]
# Axial Forces
# Bending x -- assuming simply supported beam
L_ap := L_ab_bearing + a_bearing + L_de/2
L_bpp := a_bearing + L_ef + L_part + L_de/2
L_bp := a_bearing + L_de/2
L_pp := L_ef + L_part
F := F_cut_x
Rxb := -F - F*L_bpp/L_ab
v_x_bend := F*L_bpp*L_ab_bearing^2/(6*E*I_ef) + F*L_pp*L_bp^2/(2*E*I_ef) + F*L_bp^3/(3*E*I_ef)
θ_y_bend := F*L_pp*L_bp/(E*I_ef) + F*L_bp^2/(2*E*I_ef) + F*L_bpp*L_ab_bearing/(6*E*I_ef)
T_x_beam := [1, 0, 0, v_x_bend; 0, 1, 0, 0*m; 0, 0, 1, 0*m; 0, 0, 0, 1*m] = [1, 0, 0, 8.29993e-7 m; 0, 1, 0, 0 m; 0, 0, 1, 0 m; 0, 0, 0, 1 m]
R_y_beam := [1, 0, θ_y_bend, 0*m; 0, 1, 0, 0*m; -θ_y_bend, 0, 1, 0*m; 0, 0, 0, 1*m] = [1, 0, 2.28807e-5, 0 m; 0, 1, 0, 0 m; -2.28807e-5, 0, 1, 0 m; 0, 0, 0, 1 m]
# Bending y
L_a := L_ab + L_bc + a_bearing
Ma := F_t*L_a
Mb := F_cut_y*L_bpp
Mh := F_cut_y*L_bp
θ_x_bend := Ma*L_ab/(6*E*I_ef) + Mb*L_ab_bearing/(2*E*I_ef) + Mh*L_bp/(E*I_ef)
v_y_bend := (Ma*L_ab/(6*E*I_ef) + Mb*L_ab_bearing/(6*E*I_ef))*L_bp + Mh*L_bp^2/(2*E*I_ef)
T_y_beam := [1, 0, 0, 0*m; 0, 1, 0, v_y_bend; 0, 0, 1, 0*m; 0, 0, 0, 1*m] = [1, 0, 0, 0 m; 0, 1, 0, 3.60501e-6 m; 0, 0, 1, 0 m; 0, 0, 0, 1 m]
R_x_beam := [1, 0, 0, 0*m; 0, 1, θ_x_bend, 0*m; 0, -θ_x_bend, 1, 0*m; 0, 0, 0, 1*m] = [1, 0, 0, 0 m; 0, 1, 0.000336613, 0 m; 0, -0.000336613, 1, 0 m; 0, 0, 0, 1 m]
L_shim := 3.175 mm
A_shim := 4.65*cm^2
# axial z
L_op := L_bc/2 + L_cd + L_de/2 - 2*a_bearing
k_shim := (L_shim/(E*A_shim))^-1
k_bolts := 10^100 N/m  # just to get rid of it for now
k_shaft := (L_op/(E*A_ef))^-1 = 1639.88 N/μm
k_washers := 10^100*N/m
k_equiv := 1/(1/k_shaft + 1/K_b + 1/k_shim + 1/k_bolts) + 1/(1/k_washers + 1/K_b) = 9.98395 N/μm
δ_feed := F_feed_z/k_equiv = -5.00804 μm
(1/k_shaft + 1/K_b + 1/K_b)^-1 = 2.49619 N/μm
k_equiv := 1/(1/k_shaft + 1/K_b + 1/K_b + 1/k_shim + 1/k_bolts) = 2.49598 N/μm
1/k_shim + 1/k_bolts = 3.41398e-5 μm/N
δ_pre := F_preload/k_equiv = 20.0731 μm
θ_z_tor := M_z_ef*L_ap/(J_ef*G)
T_z_beam := [1, 0, 0, 0*m; 0, 1, 0, 0*m; 0, 0, 1, (δ_pre + δ_feed); 0, 0, 0, 1*m] = [1, 0, 0, 0 m; 0, 1, 0, 0 m; 0, 0, 1, 1.5065e-5 m; 0, 0, 0, 1 m]
R_z_beam := [1, -θ_z_tor, 0, 0*m; θ_z_tor, 1, 0, 0*m; 0, 0, 1, 0*m; 0, 0, 0, 1*m] = [1, 0.00019271, 0, 0 m; -0.00019271, 1, 0, 0 m; 0, 0, 1, 0 m; 0, 0, 0, 1 m]
# Summary Calculations
H_spindle := U_S*T_z_beam*U_S*T_y_beam*U_S*T_x_beam*U_S*T_y_bearing*U_S*T_x_bearing*U_S*R_x_bearing*U_S*R_y_bearing*U_S*R_z_beam*U_S*R_x_beam*U_S*R_y_beam
# Nominal geometry of the part's tip
P_tool := [-D_part/2; 0; 0; 1]
# Actual position of the tool's contact point relative to the shaft end
P_tool_f := H_spindle*H_ef*H_fp*P_tool = [-0.0199993 m; -1.26229e-5 m; 0.0680154 m; 1]
# Nominal position of the tool's contact point relative to the shaft end
P_tool_0 := (U_S*T_n_ef*U_S*T_n_fp*P_tool) = [-0.02 m; 0 m; 0.068 m; 1]
# Error in position of the tool's contact point relative to the shaft end
P_deflection := P_tool_f - P_tool_0 = [0.711258; -12.6229; 15.4155; 0 1/m] μm
