# Tool Mount & Cross-Slide - HTMs
# Notes
# The stiffnesses for the following parts are considered as very high in the leadscrew chain and are therefore disregarded for the equivalent stiffness calculation:
# - Leadscrew Holder
# - Preload Nut
# - Tool Holder
# Flexure - Characteristics
# Dimensions - Tool Holder to Leadscrew Holder
w_flexure := 1.66 cm
e_flexure := 0.635 cm
L_flexure := 6.5 cm
# Material Properties | Properties - Flexure without leadscrew
E_flexure := 70 GPa
k_flexure := 1 N/m
# Leadscrew Characteristics
# Reference
# Left Hand: https://www.mcmaster.com/90036A229/
# Dimensions
d_thread := 0.25 in
TPI_thread := 20 1/in
P_thread := 1/TPI_thread
L_ls_free := 8 cm
# Properties
E_ls := 200 GPa
k_leadscrew := (π*(d_thread/2)^2)*E_ls/L_ls_free = 79.173 N/μm
# Leadscrew Bearings Characteristics (Thrust Ball Bearing)
# Reference
# https://www.mcmaster.com/6655K13/
# Bearing Properties
k_bearing := 50 N/μm
# Leadscrew Bearings Characteristics (Needle-Roller Thrust Bearing)
# Reference
# Needle-Roller Thrust Bearing | Thick Washer
# https://www.mcmaster.com/5909K23/ | https://www.mcmaster.com/5909K231/
# Bearing Properties
k_bearing := 50 N/μm
# Tool Characteristics
# Reference
# https://www.mcmaster.com/3367A333/
# Tool Properties
L_tool := 1.5 in
b_tool := 0.375 in
h_tool := 0.375 in
E_tool := 210 GPa
# Equivalent Stiffness
# Leadscrew Chain
k_ls_equivalent := 1/(1/(w_flexure*e_flexure*E_flexure/L_flexure) + 1/k_leadscrew + 1/k_bearing)
# Flexure and Leadscrew - Parallel
k_flexure_equivalent := k_ls_equivalent + k_flexure
# Cutting Edge to Carriage
k_total_equivalent := 1/(1/k_flexure_equivalent + 1/(b_tool*h_tool*E_tool/L_tool))
